a_1 := j*t_1 → t_1*j
a_2 := a_1 → t_1*j
a_3 := a_2 - j*t_3 → (-t_3 + t_1)*j
a_4 := 0
a_5 := -j*t_5 → -(t_5*j)
a_6 := a_5 → -(t_5*j)
a_7 := a_6 + j*t_7 → (t_7 - t_5)*j
v_1 := integral(a_1, t_1) + v_0 → t_1^2*j/2 + v_0
v_2 := integral(a_2, t_2) + v_1 → t_1^2*j/2 + t_1*t_2*j + v_0
v_3 := integral(a_3, t_3) + v_2 → -t_3*j*(t_3 - 2*t_1)/2 + t_1^2*j/2 + t_1*t_2*j + v_0
v_4 := integral(a_4, t_4) + v_3 → -t_3*j*(t_3 - 2*t_1)/2 + t_1^2*j/2 + t_1*t_2*j + v_0
v_5 := integral(a_5, t_5) + v_4 → -t_3*j*(t_3 - 2*t_1)/2 + (t_1^2*j/2 + t_1*t_2*j + v_0 - t_5^2*j/2)
v_6 := integral(a_6, t_6) + v_5 → -t_3*j*(t_3 - 2*t_1)/2 + (t_1^2*j/2 + (t_1*t_2 - t_5*t_6)*j + v_0 - t_5^2*j/2)
v_7 := integral(a_7, t_7) + v_6 → t_7*j*(t_7 - 2*t_5)/2 + (t_1^2*j/2 + j*(t_1*t_2 - t_5*t_6) + v_0 - t_5^2*j/2 - t_3*j*(t_3 - 2*t_1)/2)
p_1 := integral(v_1, t_1) → t_1^3*j/6 + t_1*v_0
p_2 := integral(v_2, t_2) + p_1 → t_1*t_2*j*(t_2 + t_1)/2 + t_1^3*j/6 + (t_2 + t_1)*v_0
p_3 := integral(v_3, t_3) + p_2 → -t_3*((t_3^2 - 3*t_1*t_3 - (6*t_1*t_2 + 3*t_1^2))*j - 6*v_0)/6 + t_1*t_2*j*(t_2 + t_1)/2 + t_1^3*j/6 + v_0*(t_2 + t_1)
p_4 := integral(v_4, t_4) + p_3 → -t_3*(j*(t_3^2 - 3*t_1*t_3 - (6*t_1*t_2 + 3*t_1^2)) - 6*v_0)/6 + (t_1*t_2*j*(t_2 + t_1)/2 + t_1^3*j/6 + v_0*(t_2 + t_1) - t_4*((t_3^2 - 2*t_1*t_3 - (2*t_1*t_2 + t_1^2))*j - 2*v_0)/2)
p_5 := integral(v_5, t_5) + 4 → -t_5*j*(t_5^2 + (3*t_3^2 - 3*t_1^2))/6 + (t_1*t_3 + t_1*t_2)*t_5*j + t_5*v_0 + 4
p_6 := integral(v_6, t_6) + p_4 → -t_4*(j*(t_3^2 - 2*t_1*t_3 - (2*t_1*t_2 + t_1^2)) - 2*v_0)/2 + (t_1*t_2*j*(t_2 + t_1)/2 + t_1^3*j/6 + v_0*(t_2 + t_1) + (t_1*t_3 + t_1*t_2)*t_6*j + t_6*v_0 - t_6*j*(t_5*t_6 + t_5^2 + (t_3^2 - t_1^2))/2 - t_3*(j*(t_3^2 - 3*t_1*t_3 - (6*t_1*t_2 + 3*t_1^2)) - 6*v_0)/6)
p_7 := integral(v_7, t_7) + p_6 → -t_4*(j*(t_3^2 - 2*t_1*t_3 - (2*t_1*t_2 + t_1^2)) - 2*v_0)/2 + (t_7*j*(t_7^2 - 3*t_5*t_7 + (3*t_1^2 - 3*t_3^2 - 3*t_5^2))/6 + (t_1*t_2*j*(t_2 + t_1)/2 + t_1^3*j/6 + t_6*j*(t_1*t_3 + t_1*t_2) + v_0*(t_2 + t_1) + (t_1*t_3 + t_1*t_2 - t_5*t_6)*t_7*j + (t_7 + t_6)*v_0 - t_6*j*(t_5*t_6 + t_5^2 + (t_3^2 - t_1^2))/2) - t_3*(j*(t_3^2 - 3*t_1*t_3 - (6*t_1*t_2 + 3*t_1^2)) - 6*v_0)/6)
P7 := p_7 simplify, substitute, t_3 == t_1, t_7 == t_5 → -j*(3*t_5*t_6^2 + 9*t_5^2*t_6 + (5*t_5^3 - (3*t_1*t_2^2 + 9*t_1^2*t_2)))/6 + ((t_1*t_2 + t_1^2)*t_6 + (t_1*t_2 + t_1^2)*t_5 + (t_1*t_2 + t_1^2)*t_4 + t_1^3)*j + (t_6 + t_5 + t_4 + t_2 + 2*t_1)*v_0
d/dt_1(P7) simplify → t_2^2*j/2 + ((t_2 + 2*t_1)*t_6 + (t_2 + 2*t_1)*t_5 + (t_2 + 2*t_1)*t_4 + 3*t_1*t_2 + 3*t_1^2)*j + 2*v_0
d/dt_2(P7) simplify → t_1*t_6*j + t_1*t_5*j + t_1*t_4*j + t_1*t_2*j + 3*t_1^2*j/2 + v_0
d/dt_4(P7) simplify → (t_1*t_2 + t_1^2)*j + v_0
δp_7(t_4) := integral(d/dt_4(P7), t_4 = a .. a + s) → s*((t_1*t_2 + t_1^2)*j + v_0)
d/dt_5(P7) simplify → -j*(t_6^2 + 5*t_5^2)/2 + (t_1*t_2 + t_1^2 - 3*t_5*t_6)*j + v_0
d/dt_6(P7) simplify → -(t_5*t_6*j) + (t_1*t_2*j + t_1^2*j + v_0 - 3*t_5^2*j/2)
V7 := v_7 simplify, substitute, t_3 == t_1, t_7 == t_5 → (-(t_5*t_6) + (t_1*t_2 + t_1^2 - t_5^2))*j + v_0
d/dt_1(V7) simplify → j*(t_2 + 2*t_1)
δv_7(t_1) := integral(d/dt_1(V7), t_1 = a .. a + s) → j*s*(s + 2*a + t_2)
d/dt_2(V7) simplify → t_1*j
δv_7(t_2) := integral(d/dt_2(V7), t_2 = a .. a + s) → t_1*j*s
d/dt_5(V7) simplify → (-t_6 - 2*t_5)*j
δv_7(t_5) := integral(d/dt_5(V7), t_5 = a .. a + s) → -(j*s*(s + 2*a + t_6))
d/dt_6(V7) simplify → -(t_5*j)
δv_7(t_6) := integral(d/dt_6(V7), t_6 = a .. a + s) → -(t_5*j*s)
d/dt_1(V7)/d/dt_5(V7) → (-t_2 - 2*t_1)/(t_6 + 2*t_5)
integral(-d/dt_1(V7)/d/dt_5(V7), t_1 = a .. a + s) → s*(s + 2*a + t_2)/(t_6 + 2*t_5)
V4 := v_4 simplify, substitute, t_3 == t_1, t_7 == t_5 → (t_1*t_2 + t_1^2)*j + v_0
integral(d/dt_1(V4), t_1 = a .. a + s) → j*s*(s + 2*a + t_2)
integral(d/dt_2(V4), t_2 = a .. a + s) → t_1*j*s
integral(d/dt_2(V7), t_2 = a .. a + ss)/integral(d/dt_6(V7), t_6 = b .. b + sss) == -1 solve, sss → t_1*ss/t_5 =  # error: This variable is undefined. Check that the label is set correctly.
integral(d/dt_2(V7), t_2 = a .. a + ss)/integral(d/dt_5(V7), t_5 = b .. b + sss) == -1 solve, sss, substitute, a == t_1, b == t_5 → [
    (sqrt(4*t_1*ss + t_6^2 + 4*t_5*t_6 + 4*t_5^2) - t_6)/2 - t_5;
    -(sqrt(4*t_1*ss + t_6^2 + 4*t_5*t_6 + 4*t_5^2) + t_6)/2 - t_5
]
integral(d/dt_1(V7), t_1 = a .. a + ss)/integral(d/dt_5(V7), t_5 = b .. b + sss) == -1 solve, sss, substitute, a == t_1, b == t_5 → [
    (sqrt(4*ss^2 + (4*t_2 + 8*t_1)*ss + t_6^2 + 4*t_5*t_6 + 4*t_5^2) - t_6)/2 - t_5;
    -(sqrt(4*ss^2 + (4*t_2 + 8*t_1)*ss + t_6^2 + 4*t_5*t_6 + 4*t_5^2) + t_6)/2 - t_5
]
integral(d/dt_1(V7), t_1 = a .. a + ss)/integral(d/dt_6(V7), t_6 = b .. b + sss) == -1 solve, sss, substitute, a == t_1, b == t_5 → ss*(ss + t_2 + 2*t_1)/t_5
V3 := v_3 simplify, substitute, t_3 == t_1, t_7 == t_5 → (t_1*t_2 + t_1^2)*j + v_0
j := 50000  # disabled
t_1 := 0.04  # disabled
t_2 := 0  # disabled
dV := 20  # disabled
integral(d/dt_1(V3), t_1 = a .. a + ss) == dV solve, ss, substitute, a == t_1, b == t_5 → [
    sqrt(j*((t_2^2 + 4*t_1*t_2 + 4*t_1^2)*j + 4*dV))/(2*j) - (t_2/2 + t_1);
    -sqrt(j*((t_2^2 + 4*t_1*t_2 + 4*t_1^2)*j + 4*dV))/(2*j) - (t_2/2 + t_1)
]
ss := -0.022360816255  # disabled
t_5 := 0.0223605432958  # disabled
t_6 := 0  # disabled
integral(d/dt_6(V7), t_6 = a .. a + ss)/integral(d/dt_5(V7), t_5 = b .. b + sss) == 1 solve, sss, substitute, a == t_1, b == t_5, t_6 == 0 → [-sqrt(4*t_5*(ss + t_5))/2 - t_5; sqrt(4*t_5*(ss + t_5))/2 - t_5]
A5 := a_5 → -(t_5*j)
